units real

# Setting up styles for atoms and potential energy functions
atom_style     hybrid sphere dipole molecular
pair_style     hybrid lj/sf/dipole/sf 12.0 lj/sf/dipole/sf 12.0 lj/charmm/coul/long 11.0 12.0
special_bonds lj/coul 0.0  0.999999 0.999999
pair_modify pair lj/charmm/coul/long special lj 0.0 0.0 0.5
pair_modify pair lj/charmm/coul/long special coul 0.0 0.0 0.8333
pair_modify    mix arithmetic
kspace_style   pppm/cg 1.0e-5
bond_style     harmonic
angle_style    hybrid cosine/squared dipole harmonic
dihedral_style harmonic

# Read the data file and the force field from file
read_data data.128dopc_kalp23_pushed
include  forcefield.128dopc_kalp23_scaled

# Define some groups
group solute type > 7
group cg type 1:7
group membrane type 2:7
group water type 1
group restbeads type 1 2 7
group restbeads2 type 2 7
# !!! THIS needs to be changed for other solutes !!!
group heavy type 8 10 12 13 16 17 18 19 20

set group solute diameter 0.0
velocity all create 303 1121

# Setting up neighbor list and time step, use rRESPA
neighbor     2.0 bin
neigh_modify every 1 delay 0 check yes
timestep 8.0
run_style respa 2 4 hybrid 1 2 1 kspace 1

# Setup integration, thermostat and barostat fixes
fix integrateSolute    solute nve
fix integrateCG        cg nve/sphere update dipole/dlm
fix thermostatWater    water langevin 303 303 1000 9 omega yes zero yes
fix thermostatMembrane membrane langevin 303 303 1000 9 omega yes zero yes
fix thermostatSolute   solute langevin 303 303 1000 9
fix barostat           all press/berendsen aniso 1 1 1000 couple xy modulus 21740
fix zeroMom            all momentum 500 linear 1 1 1
fix shakeH             solute shake 1.0e-6 100 0 m 3.00

# Change the default output
thermo_style  custom step temp press etotal pe
thermo_modify flush yes lost warn
thermo        150

balance 1.1 shift xyz 5 1.1 weight group 1 solute 4.0

# Run the simulation!
fix loadbalance all balance 100 1.1 shift xyz 5 1.1 weight group 1 solute 4.0
run 50000

# Write a data file to
write_data data.128dopc_kalp23_sim
